1
2/(3 + 1/5) + (3 + 1/4)/13/(2/3) + ((2 + 5/18) - 17/36)*18.6 = 34.5833
2
(2*x^3 + x^2*y + 2*yx^2 - y^3)*(x + 5*y) - (x^3 - 2*x^2*y + 3*xy^2 + 5*y^3)*(2*x - y) expand → 16*x^3*y + 3*x^2*y^2 - 11*x*y^3 - 6*x*xy^2 + 2*x*yx^2 + 3*y*xy^2 + 10*y*yx^2
3
x^3 + 9*x^2 + 23*x + 15 factor → (x + 3)*(x + 5)*(x + 1)
x^3 + 9*x^2 + 23*x + 15 solve → [-1; -3; -5]
4
a := [4; -1; 0]
A := -2
b := [3; -3; 4]
B := 4
c := [5; 2; -1]
C := 2
B*a = [16; -4; 0]
B*a - A*b + C*c = [32; -6; 6]
a×b = [-4; -16; -9]
a*b = 15
5
A := [1, 1, 5; 3, 2, 7; 7, -1, 0]
B := [5; 0; 4]
C := [6, 2, 2; -1, 4, 7; 3, 1, 1]
det(A) = -29
det(C) = 0
transpose(B) = [5, 0, 4]
A^-1 = [-0.241379, 0.172414, 0.103448; -1.68966, 1.2069, -0.275862; 0.586207, -0.275862, 0.0344828]
rank(A) = 3
rank(C) = 2
A*B = [25; 43; 35]
A^2 = [39, -2, 12; 58, 0, 29; 4, 5, 28]
6
A := [6, 1, 5, 3; 1, 2, 1, -1; 2, 4, -1, 2; 7, -1, 2, 1]
B := [5; 1; 9; 5]
X := A^-1*B = [1; 1; -1; 1]
lsolve(A, B) = [1; 1; -1; 1]
rref(A) = [1, 0, 0, 0; 0, 1, 0, 0; 0, 0, 1, 0; 0, 0, 0, 1]
