1
f(x) := cos(2*x)
x0 := 0.5
limit(f(x), x → x0) → 0.540302305868
d/dx(f(x)) → -2*sin(2*x)
d^2/dx^2(f(x)) → -4*cos(2*x)
d/dx0(f(x0)) → -1.68294196962
d^2/dx0^2(f(x0)) → -2.16120922347
k := d/dx0(f(x0)) = -1.68294
yk(x) := k*(x - x0) + f(x0)
yn(x) := -1/k*(x - x0) + f(x0)
# [plot: f(x), yn(x), yk(x) vs x]
2
x(t) := cos(t)^2 + cos(t)
y(t) := cos(t)*sin(t) + sin(t)
# [plot: y(t) vs x(t)]
3
p(fi) := 2*(1 - cos(fi))
# [polar plot: fi, p(fi)]
4
x := -1, .05 .. 10
f(x) :=
    if x ≤ 0
        return 2*x^2
    else if 0 < x ≤ 1
        return x
    else if x > π
        return x + 2
    else
        return x - 1
# [plot: f(x) vs x]
5
clear(x)
f(x) := 1/(6*x^3 - 7^2 - 3*x)
a := 3
b := 15
f(x) parfrac → -1/(3*x - 6*x^3 + 49)
integral(f(x), x = a .. b) = 0.0106893
6
f(x) := x^3/(x^2 - x + 1)
1
x^2 - x + 1 ≠ 0
x^2 - x + 1 solve → [1/2 + sqrt(3)*1i/2; 1/2 - sqrt(3)*1i/2]
limit(f(x), x → 1/2 + sqrt(3)*1i/2+) → (-1i)*∞
limit(f(x), x → 1/2 + sqrt(3)*1i/2-) → 1i*∞
2
limit(f(x), x → 1/2 - sqrt(3)*1i/2+) → undefined
limit(f(x), x → 1/2 - sqrt(3)*1i/2-) → undefined
k := limit(x^3/((x^2 - x + 1)*x), x → ∞) → 1
b := limit(x^3/(x^2 - x + 1), x → ∞) - x → ∞ - x
3
x^3/(x^2 - x + 1) solve, x → 0
f(0) = 0
4
-x^3/(x^2 + x + 1)
четная
5
d/dx(f(x)) → 3*x^2/(x^2 - x + 1) - x^3*(2*x - 1)/(x^2 - x + 1)^2 simplify → (2*x - 1)/(x^2 - x + 1)^2 + 1
6
d^2/dx^2(f(x)) → 6*x/(x^2 - x + 1) - 2*x^3/(x^2 - x + 1)^2 + 2*x^3*(2*x - 1)^2/(x^2 - x + 1)^3 - 6*x^2*(2*x - 1)/(x^2 - x + 1)^2 simplify → -6*x*(x - 1)/(x^2 - x + 1)^3
-6*x*(x - 1)/(x^2 - x + 1)^3 solve, x → [0; 1]
7
f(x) := x^3/(x^2 - x + 1)
f1(x) := x^2 - x + 1
# [plot: f(x), f1(x) vs x]
