1
N := 100
M := 20
m := 10
m1 := 7
C(Q, R) := combin(Q, R)
1.1
P_A := M/N = 0.2
1.2
P_A := C(M, m)/C(N, m) = 1.06732e-8
1.3
P_A := C(M, m1)*C(N - M, m - m1)/C(N, m) = 0.000367934
2
n := 1000
n1 := 420
n2 := 210
n3 := n - n1 - n2 = 370
m1 := 0.08
m2 := 0.07
m3 := 0.06
i := 1
2.1
P_A_1 := n1/n*m1 + n2/n*m2 + n3/n*m3 = 0.0705
2.2
P_A_2 := n1/n*m1/P_A_1 = 0.476596
3
(a)
n := 11
k1 := 5
k2 := 8
p := 0.8
(a)
func_P(var_n, var_k) := combin(var_n, var_k)*p^var_k*(1 - p)^(var_n - var_k)
3.1
func_P(n, k2) = 0.221459
3.2
func_P(n, 0) + func_P(n, 1) + func_P(n, 2) + func_P(n, 3) + func_P(n, 4) = 0.00196536
3.3
func_P(n, 9) + func_P(n, 10) + func_P(n, 11) = 0.617402
3.4
1 - func_P(n, 0) = 1
3.5
func_P(n, 5) + func_P(n, 6) + func_P(n, 7) + func_P(n, 8) = 0.380633
(b)
n := 100
f(x) := 1/sqrt(2*π)*exp(-x^2/2)
k1 := 40
k2 := 65
q := 1 - p = 0.2
3.1
x := (k2 - n*p)/sqrt(n*p*q) = -3.75
f(x) = 0.000352596
3.2
3.3
3.4
3.5
4
a := 4
X := [0; 1; 2; 3; 7; 9]
P := [0.06; 0.14; 0.3; 0.25; 0.15; 0.1]
b := 8
4.1
clear(x)
F(x) :=
    if x ≤ 0
        0
    if 0 < x ≤ 1
        0.06
    if 1 < x ≤ 2
        0.2
    if 2 < x ≤ 3
        0.5
    if 3 < x ≤ 7
        0.75
    if 7 < x ≤ 9
        0.9
    if 9 < x
        1
# [plot: F(x) vs x]
4.2
M := sum(X[i]*P[i], i = 0 .. 5) = 3.44
D := sum((X[i] - M)^2*P[i], i = 0 .. 5) = 7.2064
σ := sqrt(D) = 2.68447
4.3
F(b) - F(a) = 0.15
5
clear(X, a, b, x, M, D, σ, F)
f(x) :=
    if 1 ≥ x > 2
        0
    if 1 < x ≤ 2
        3*(x - 1)^2
a := 1.5
b := 2
5.1
F(x) :=
    if x ≤ 1
        integral(0, x = -∞ .. x)
    if 1 < x ≤ 2
        integral(0, x = -∞ .. 1) + integral(3*(x - 1)^2, x = 1 .. x)
    if 2 < x
        integral(0, x = -∞ .. 1) + integral(3*(x - 1)^2, x = 1 .. 2) + integral(0, x = 2 .. x)
# [plot: F(x) vs x]
5.2
M := integral(x*F(x), x = a .. b) = 0.428125
D := integral(x^2*F(x), x = a .. b) = 0.785938
σ := sqrt(D) = 0.886531
f0(X) := 3*(X - 1)^2
d/dX(f0(X)) → 6*X - 6
f1(X) := d/dX(f0(X))
f1(X) solve → 1
f1(-2) = -18
f1(1) = 0
integral(f0(x), x = 0 .. x) solve, x → [0; 3/2 + sqrt(3)*1i/2; 3/2 - sqrt(3)*1i/2]
5.3
integral(f(x), x = a .. b) = 0.875
6
N := 2000
m := 2
p := 0.003
λ := N*p = 6
P(k, λ) := dpois(k, λ)
6.1
P(0, λ) = 0.00247875
P(1, λ) = 0.0148725
P(2, λ) = 0.0446175
P(3, λ) = 0.0892351
P(4, λ) = 0.133853
P(5, λ) = 0.160623
P(10, λ) = 0.0413031
P(100, λ) = 1.73522e-83
P(1000, λ) = 0
6.2
sum(P(i, λ), i = 6 .. N) = 0.55432
7
a := 15
σ := 5
α := 8
β := 12
δ := 3
7.1
f(x) := 1/nthroot(2*π, σ)*e^(-(x - a)^2/(2*σ^2))
7.2
F(x) := integral(f(t), t = -∞ .. x)
7.3
M := a = 15
σ = 5
D := σ^2 = 25
7.4
P := F(β) - F(α) = 1.67918
7.5
2*0.3332 = 0.6664
δ/σ = 0.6
