n := 60
X := [
    165, 143, 152, 167, 164, 199, 171, 171, 156, 149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]
a := min(X) = 135
b := max(X) = 199
R := b - a = 64
h := (b - a)/(1 + log(n, 2)) = 9.26611
m := R/h = 6.90689
x_start := a - h/2 = 130.367
130, 139 .. □
139, 148 .. □
148, 157 .. □
157, 166 .. □
166, 175 .. □
175, 184 .. □
184, 193 .. □
193, 202 .. □
Y := sort(transpose(X))
