1
n := 70
m := 9
n1 := 22
m1 := 2
n2 := 28
m2 := 4
n3 := 20
m3 := 3
C(Q, R) := combin(Q, R)
а.
P(A) := n1/n = 0.314286
б.
P(A) := C(n1, m)/C(n, m) = 7.64867e-6
в.
P(A) := C(n1, m1)*C(n - n1, m - m1)/C(n, m) = 0.261531
г.
P(A) := C(n1, m1)*C(n2, m2)*C(n3, m3)/C(n, m) = 0.0829093
д.
P(A) := 1 - C(n, n - n1)/C(n, n1) = 0
2
p1 := 0.5
p2 := 0.7
p3 := 0.9
а.
P(A1A2A3) := p1*p2*p3
б.
P(B) := p1*(1 - p2)*(1 - p3) + (1 - p1)*p2*(1 - p3) + (1 - p1)*(1 - p2)*p3 = 0.185
в.
P(B) := p1*p2*(1 - p3) + (1 - p1)*p2*p3 + p1*(1 - p2)*p3 = 0.485
г.
P(D) := 1 - ((1 - p1)*(1 - p2)*(1 - p3)) = 0.985
3
n := 1000
n1 := 120
n2 := 380
n3 := n - n1 - n2 = 500
m1 := 0.10
m2 := 0.06
m3 := 0.09
i := 2
а.
P(A) := n1/n*m1 + n2/n*m2 + n3/n*m3 = 0.0798
б.
P(B) := n2/n*m2/P(A) = 0.285714
4
k := 10
k1 := 6
k2 := 8
p := 0.7
func_P(var_n, var_k) := combin(var_n, var_k)*p^var_k*(1 - p)^(var_n - var_k)
а.
P(A) := func_P(k, k1) = 0.200121
б.
P(B) := func_P(k, 6) + func_P(k, 7) + func_P(k, 8) + func_P(k, 9) + func_P(k, k) = 0.849732
в.
P(B) := func_P(k, 0) + func_P(k, 1) + func_P(k, 2) + func_P(k, 3) + func_P(k, 4) + func_P(k, 5) + func_P(k, 6) + func_P(k, 7) + func_P(k, 8) = 0.850692
г.
P(D) := 1 - func_P(10, 0) = 0.999994
5
a := 0
b := 7
X := [1; 2; 4; 5; 6; 8]
P := [0.3; 0.14; 0.16; 0.03; 0.2; 0.17]
а.
F(x) :=
    if x ≤ 1
        0
    if 1 < x ≤ 2
        0.3
    if 2 < x ≤ 4
        0.44
    if 4 < x ≤ 5
        0.6
    if 5 < x ≤ 6
        0.63
    if 6 < x ≤ 8
        0.83
    if 8 < x
        1
# [plot: F(x) vs x]
б.
M := 1*0.3 + 2*0.14 + 4*0.16 + 5*0.03 + 6*0.2 + 8*0.17 = 3.93
D := sum((X[i] - M)^2*P[i], i = 0 .. 5) = 6.8051
σ := sqrt(D) = 2.60866
в.
F(b) - F(a) = 0.83
6
clear(X, a, b, x, M, D, σ, F)
a := 0
b := 1
f(X) :=
    if 2 < X ≤ -1
        0
    if -1 < X ≤ 2
        1/9*(X + 1)^2
# [plot: f(x) vs x]
а.
F(X) :=
    if X ≤ -1
        integral(0, X = -∞ .. X)
    if -1 < X ≤ 2
        integral(0, X = -∞ .. -1) + integral(1/9*(X + 1)^2, X = -1 .. X)
    if 2 < X
        integral(0, X = -∞ .. -1) + integral(1/9*(X + 1)^2, X = -1 .. 2) + integral(0, X = 2 .. X)
# [plot: F(x) vs x]
б.
M := integral(x*F(x), x = a .. b) = 0.0907407
D := integral(x^2*F(x), x = a .. b) = 0.0685185
σ := sqrt(D) = 0.26176
f0(X) := 1/9*(X + 1)^2
d/dX(f0(X)) → 2*X/9 + 2/9
f1(X) := d/dX(f0(X))
f1(X) solve → -1
f1(-2) = -0.222222
f1(1) = 0.444444
integral(f0(x), x = 0 .. x) solve, x → [0; -3/2 + sqrt(3)*1i/2; -3/2 - sqrt(3)*1i/2]
в.
integral(f(x), x = 0 .. 1) = 0.259259
7
N := 3
p := 0.11
func_P(var_n, var_k) := combin(var_n, var_k)*p^var_k*(1 - p)^(var_n - var_k)
X := [0; 1; 2; 3]
P := [func_P(3, 0); func_P(3, 1); func_P(3, 2); func_P(3, 3)] = [0.704969; 0.261393; 0.032307; 0.001331]
M := X[0]*P[0] + X[1]*P[1] + X[2]*P[2] + X[3]*P[3] = 0.33
D := sum((X[i] - M)^2*P[i], i = 0 .. 3) = 0.2937
σ := sqrt(D) = 0.541941
8
N := 1000
m := 6
p := 0.005
λ := N*p = 5
P(k, λ) := dpois(k, λ)
а.
P(0, λ) = 0.00673795
P(1, λ) = 0.0336897
P(2, λ) = 0.0842243
P(3, λ) = 0.140374
P(4, λ) = 0.175467
P(5, λ) = 0.175467
P(10, λ) = 0.0181328
P(100, λ) = 5.6954e-91
P(1000, λ) = 0
б.
sum(P(i, λ), i = 6 .. N) = 0.384039
9
a := 19
m := 8
а.
f(x) :=
    if 0 < x ≤ a
        1/(a - 0)
    else
        0
# [plot: f(x) vs x]
б.
F(x) :=
    if x ≤ 0
        0
    if 0 < x ≤ a
        (x - 0)/(a - 0)
    if x > a
        1
# [plot: F(x) vs x]
в.
M(x) := (a + 0)/2 = 9.5
D(x) := (a - 0)^2/12 = 30.0833
г.
P(A) := (m - 0)/a + (a - (a - m))/a = 0.842105
P(B) := 1 - P(A) = 0.157895
10
λ := 3
t := 8
а.
f(x) :=
    if x < 0
        0
    if x ≥ 0
        λ*e^(-λ*x)
# [plot: f(x) vs x]
б.
F(x) :=
    if x < 0
        0
    if x ≥ 0
        1 - e^(-λ*x)
# [plot: F(x) vs x]
в.
R(x) :=
    if x < 0
        0
    if x ≥ 0
        e^(-λ*x)
# [plot: R(x) vs x]
г.
M(x) := 1/λ = 0.333333
D(x) := 1/λ^2 = 0.111111
д.
f(t) = 1.13254e-10
F(t) = 1
R(t) = 3.77513e-11
11
a := 12
σ := 9
α := 9
β := 15
δ := 4
а.
f(x) := 1/nthroot(2*π, σ)*e^(-(x - a)^2/(2*σ^2))
б.
F(x) := integral(f(t), t = -∞ .. x)
в.
M := a = 12
σ = 9
D := σ^2 = 81
г.
P := F(β) - F(α) = 4.80266
д.
2*0.3261 = 0.6522
