X := transpose([
    9, 9, 6, 9, 9, 7, 6, 11, 6, 7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])
n := length(X) = 70
(1)
(а)
Y := sort(X)
transpose(Y) = [
    3, 4, 4, 4, 5, 5, 5, 5, 5, 5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]
(б)
a := min(X) = 3
b := max(X) = 14
R := b - a = 11
h := (b - a)/(1 + ln(n)/ln(2)) = 1.54293
h1 := round(h) = 2
m := R/h = 7.12928
m1 := round(m) = 7
x0 := a - h/2 = 2.22853
a1 := round(x0) = 2
j := 0 .. m1
i := 0 .. m1 - 1
t[j] := a1 + h1*j
transpose(t) = [2, 4, 6, 8, 10, 12, 14, 16]
(в)
x[i] := t[i] + h1/2
transpose(x) = [3, 5, 7, 9, 11, 13, 15]
(2)
(а)
w1 := hist(t, X)
transpose(w1) = [1, 14, 24, 17, 9, 4, 1]
w2 := w1/n
transpose(w2) = [0.0142857, 0.2, 0.342857, 0.242857, 0.128571, 0.0571429, 0.0142857]
# [plot: w1 vs t]
# [plot: w2 vs t]
(б)
(1)
w3 := hist(x, X)
transpose(w3) = [4, 24, 17, 15, 8, 2]
w4 := w3/n
transpose(w4) = [0.0571429, 0.342857, 0.242857, 0.214286, 0.114286, 0.0285714]
# [plot: w3 vs x]
# [plot: w4 vs x]
(2)
F(x) :=
    if x ≤ 3
        0
    if 3 < x ≤ 5
        0.014
    if 5 < x ≤ 7
        0.214
    if 7 < x ≤ 9
        0.557
    if 9 < x ≤ 11
        0.8
    if 11 < x ≤ 13
        0.929
    if 13 < x ≤ 15
        0.986
    if 15 < x
        1
# [plot: F(v) vs v]
(3)
m := mean(X) = 7.57143
(4)
s1 := var(X) = 5.75918
s2 := n/(n - 1)*s1 = 5.84265
(5)
σ := stdev(X) = 2.39983
s := sqrt(s2) = 2.41716
6*mode(X) = 36
median(X) = 7
(в)
γ := 0.92
x_b := 11.48
n := 36
σ := 6
Ф(t) := γ/2 = 0.46
t := 1.72
x_b - t*σ/sqrt(n) = 9.76
x_b + t*σ/sqrt(n) = 13.2
9.76 < a < 13.2
