U := 5
f := 1000
ω := 2*π*f = 6283.19
R := 150
L := 31.84*10^-3
C := 1.25*10^-6
X_C := 1/(ω*C) = 127.324
X_L := ω*L = 200.057
Z := R + 1j*X_L - 1j*X_C = 150 + 72.7327j
|Z| = 166.703
arg(Z) = 25.868 deg
I := U/Z = 0.0269881 - 0.0130861j
|I| = 0.0299934
arg(I) = -25.868 deg
U_R := R*I = 4.04821 - 1.96292j
|U_R| = 4.49901
arg(U_R) = -25.868 deg
U_L := 1j*X_L*I = 2.61796 + 5.39915j
|U_L| = 6.00037
arg(U_L) = 64.132 deg
U_C := -1j*X_C*I = -1.66617 - 3.43623j
|U_C| = 3.81888
arg(U_C) = -115.868 deg
S_ist := 1000*U*conj(I) = 134.94 + 65.4305j
P := Re(S_ist) = 134.94
Q := Im(S_ist) = 65.4305
|S_ist| = 149.967
UU := transpose([0, U_R, 0, U_L, 0, U_C, 0, U])
Usum := transpose([U_R, U, U_L + U_C])
II := transpose([0, I])
u_C0 := |U_C|*sqrt(2)*sin(arg(U_C)) = -4.85956
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